** vim:ft=abaqus
** All values in SI units: m,s,kg,N,Pa,J
** (length,time,mass,force,stress,energy).

*HEADING
Problem description
** Import geometry (run “make include” after “make all.msh” to get a list of includes)
*INCLUDE, INPUT=all.msh
*INCLUDE, INPUT=fix.nam
*INCLUDE, INPUT=load.nam

** Rigid body constraints should be defined before step!
*RIGID BODY, NSET=Nload, REF NODE=1

** Fixation
*BOUNDARY
Nfix,1,3

** Material properties
*MATERIAL, NAME=EN_AW_5083_H111
*ELASTIC, TYPE=ISO
71e9,0.33,293
** H111: Rp = 150, Rm = 310, em = 0.13
** limit strain = 150e6/71e9 + 0.002 = 0.004113
*PLASTIC
150e6,0.002,293
175e6,0.00485,293
200e6,0.01046,293
250e6,0.03773,293
280e6,0.0724,293
3.1e+08,0.13,293
*DENSITY
2660
*EXPANSION, TYPE=ISO
25e-6,293

** Apply material properties to element sets.
*SOLID SECTION, ELSET=Eall, MATERIAL=EN_AW_5083_H111

***** Linear static calculation with concentrated load on rigid body. *****
*STEP
*STATIC
*CLOAD
1,3,-100
*NODE FILE
U
*EL FILE
ZZS,ME
*END STEP

** In subsequent steps, use the following empty commands (without 2nd line).
***EL FILE
***EL PRINT, ELSET=Eall
