# vim:fileencoding=utf-8:ft=cgx

# Define the view.
rot y
rot r 135
rot u 30

# Set up the presentation
view sh off
view elem

# Read the mesh.
read all.msh inp
read fix.nam inp
read load.nam inp
frame

read capt.txt
ulin Mesh, fixed = red, load = blue, green = ref

seta ref n 1

plus n Nfix r 8
plus n Nload b 4
plus n ref g 8
