# vim:fileencoding=utf-8:ft=cgx

# Define the view.
rot y
rot r 135
rot u 30

# Set up the presentation
cmap jet
# Values outside range are colored magenta.
asgn minc m
asgn maxc m
# Set and lock max stress.
minc -0.004113 el
maxc  0.004113 el
# Do not shade
view sh off
# Do not show element boundaries
view elem off

# Read result data
read job.frd
# Read input data (sets, no mesh)
read job.inp nom
# Remove surface elements.
# zap +S6
frame

# mirror
#copy all new mir y
#comp all do

read capt.txt
ulin Worst principal strain [-]

# Strain
ds 2 e 23
view disp
