# vim:fileencoding=utf-8:ft=cgx

# Define the view.
rot y
rot r 135
rot u 30

# Set up the presentation
cmap coolwarm
mm 100e6 el
view sh off
view elem

# Read result data
read job.frd
# Read input data (sets, no mesh)
read job.inp nom
# Remove surface elements.
# zap +S6
frame

# mirror
#copy all new mir y
#comp all do

read capt.txt
ulin Worst principal stress [Pa]

# Stress
ds 4 e 23
view disp
scal d 10
