** vim:fileencoding=utf-8:ft=abaqus
** All values in SI units: m,s,kg,N,Pa,J
** (length,time,mass,force,stress,energy).

***** Eigenfrequency calculation *****
*STEP
*FREQUENCY,SOLVER=SPOOLES
10
** Only leave this in if you need it.
*NODE FILE
U
** Do not add mass calculation here; it will be done for every eigenfrequency.
** Don't file or print element data (disable leftovers from the previous step).
*EL FILE
*EL PRINT, ELSET=Eall
*END STEP
